# Linear ("inclined") corrective spectrum:
F := sum((f[n] - g[n]*(a_0 + a_1*λ[n]))^2, n = 1 .. N)  # error: This variable is undefined.
d/da_0(F) collect, a_0, a_1 → 2*sum(g[n]^2, n = 1 .. N)*a_0 + 2*sum(λ[n]*g[n]^2, n = 1 .. N)*a_1 - 2*sum(f[n]*g[n], n = 1 .. N)
d/da_1(F) collect, a_0, a_1 → 2*sum(λ[n]*g[n]^2, n = 1 .. N)*a_0 + 2*sum(λ[n]^2*g[n]^2, n = 1 .. N)*a_1 - 2*sum(λ[n]*f[n]*g[n], n = 1 .. N)
Given
d/da_0(F) == 0
d/da_1(F) == 0
[a_0; a_1] := Find(a_0, a_1)  # error: This variable is undefined.
a_0 simplify → -(sum(λ[n]^2*g[n]^2, n = 1 .. N)*sum(f[n]*g[n], n = 1 .. N) - sum(λ[n]*f[n]*g[n], n = 1 .. N)*sum(λ[n]*g[n]^2, n = 1 .. N))/(sum(λ[n]*g[n]^2, n = 1 .. N)^2 - sum(λ[n]^2*g[n]^2, n = 1 .. N)*sum(g[n]^2, n = 1 .. N))
a_0 := a_0
a_1 simplify → -(sum(λ[n]*f[n]*g[n], n = 1 .. N)*sum(g[n]^2, n = 1 .. N) - sum(f[n]*g[n], n = 1 .. N)*sum(λ[n]*g[n]^2, n = 1 .. N))/(sum(λ[n]*g[n]^2, n = 1 .. N)^2 - sum(λ[n]^2*g[n]^2, n = 1 .. N)*sum(g[n]^2, n = 1 .. N))
# Uniform ("white") corrective spectrum:
F := sum((f[n] - g[n]*a_0)^2, n = 1 .. N)  # error: This variable is undefined.
d/da_0(F) collect, a_0 → 2*sum(g[n]^2, n = 1 .. N)*a_0 - 2*sum(f[n]*g[n], n = 1 .. N)
Given
d/da_0(F) == 0
a_0 := Find(a_0)  # error: This variable is undefined.
a_0 simplify → sum(f[n]*g[n], n = 1 .. N)/sum(g[n]^2, n = 1 .. N)
